# OpenSim document version 30000
ForceSet cmc_actuators:
  defaults: CoordinateActuator default: optimal_force=1
  CoordinateActuator Pelvis_ty: coordinate=Pelvis_ty optimal_force=1
  CoordinateActuator LHip_rz: coordinate=LHip_rz optimal_force=1000
  CoordinateActuator LKnee_rz: coordinate=LKnee_rz optimal_force=1000
