# OpenSim document version 30000
CMC_TaskSet dynhop_cmc:
  defaults: CMC_Joint default: weight=1 wrt_body=-1 express_body=-1 active=(true false false) kp=(100 1 1) kv=(20 1 1)
      ka=(1 1 1) r0=(0 0 0) r1=(0 0 0) r2=(0 0 0) limit=0
  CMC_Joint Pelvis_ty: weight=30 coordinate=Pelvis_ty
  CMC_Joint LHip_rz: weight=1 coordinate=LHip_rz
  CMC_Joint LKnee_rz: weight=1 coordinate=LKnee_rz
