# OpenSim document version 30000
Model WalkerModel:
  credits: Daniel A. Jacobs, Ajay Seth
  length_units: meters
  force_units: N
  gravity: 0 -9.80665 0
  BodySet:
    Body ground: mass=0 mass_center=(0 0 0) inertia_xx=1 inertia_yy=1 inertia_zz=1
    Body Platform: mass=1 mass_center=(0 0 0) inertia_xx=1 inertia_yy=1 inertia_zz=1 meshes=box.vtp
      WeldJoint PlatformToGround: parent_body=ground location_in_parent=(0 0 0) location=(0 0 0)
    Body Pelvis: mass=30 mass_center=(0 0 0) inertia_xx=0.0001 inertia_yy=0.006666667 inertia_zz=0.0001
        meshes=sphere.vtp
      SliderJoint PelvisToPlatform: parent_body=Platform location_in_parent=(0 0 0)
          orientation_in_parent=(0 0 1.570796) location=(0 0 0) orientation=(0 0 1.570796)
        Coordinate Pelvis_ty: motion_type=translational default_value=1.2 range=(-5 10)
    Body LeftThigh: mass=10 mass_center=(0 0 0) inertia_xx=0.0001 inertia_yy=0.0001 inertia_zz=0.001041667
        meshes=sphere.vtp
      PinJoint LThighToPelvis: parent_body=Pelvis location_in_parent=(0 0 0) location=(0 0.25 0)
        Coordinate LHip_rz: motion_type=rotational default_value=0.25 range=(-1.745329 1.745329)
    Body LeftShank: mass=5 mass_center=(0 0 0) inertia_xx=0.0001 inertia_yy=0.0001 inertia_zz=0.001041667
        meshes=sphere.vtp
      PinJoint LShankToLThigh: parent_body=LeftThigh location_in_parent=(0 -0.25 0) location=(0 0.25 0)
        Coordinate LKnee_rz: motion_type=rotational default_value=-0.5 range=(-2.443461 0)
  ForceSet:
    SpringGeneralizedForce LHipSpring: coordinate=LHip_rz stiffness=500 rest_length=0.25 viscosity=2
    SpringGeneralizedForce LKneeSpring: coordinate=LKnee_rz stiffness=500 rest_length=-0.5 viscosity=2
    HuntCrossleyForce LFootContact: transition_velocity=0.2
      ContactParametersSet contact_parameters:
        ContactParameters: geometry=(LFootContact PlatformContact) stiffness=500000 dissipation=0 static_friction=3.8
            dynamic_friction=2.4 viscous_friction=2.4
    HuntCrossleyForce LKneeContact: transition_velocity=0.2
      ContactParametersSet contact_parameters:
        ContactParameters: geometry=(LKneeContact PlatformContact) stiffness=100000 dissipation=1 static_friction=3.8
            dynamic_friction=2.4 viscous_friction=0.4
    HuntCrossleyForce LHipContact: transition_velocity=0.2
      ContactParametersSet contact_parameters:
        ContactParameters: geometry=(LHipContact PlatformContact) stiffness=100000 dissipation=1 static_friction=3.8
            dynamic_friction=2.4 viscous_friction=0.4
  MarkerSet:
    Marker Pelvis: Pelvis (0 0 0)
    Marker LKnee: LeftThigh (0 -0.25 0)
    Marker LFoot: LeftShank (0 -0.25 0)
  ContactGeometrySet:
    ContactSphere LFootContact: body_name=LeftShank location=(0 -0.2 0) radius=0.05
    ContactSphere LKneeContact: body_name=LeftShank location=(0 0.25 0) radius=0.05
    ContactSphere LHipContact: body_name=Pelvis location=(0 0 0) radius=0.05
    ContactHalfSpace PlatformContact: body_name=Platform location=(0 0.025 0) orientation=(0 0 -1.570796)
